// COMSOL Multiphysics 5.3.1.180 model "youwu0422.mph"
// Outline of the model tree

Geometry
  geom1 "Geometry 1" (2D, length unit m)
    imp1: Import
      type = native
      filename = C:\chen\硕士相关\电学成像相关\comsol仿真\comsol 陈\model.mphbin
      meshfilename = C:\chen\硕士相关\电学成像相关\comsol仿真\comsol 陈\model.mphbin
    c1: Circle | pos = {-0.5, 0}; r = 0.2
    fin: Finalize "Form Union"

Materials
  mat1: Common "Titanium beta-21S" on all domains
    def "Basic"
      relpermeability = 1
      electricconductivity = 7.407e5[S/m]
      thermalexpansioncoefficient = 7.06e-6[1/K]
      heatcapacity = 710[J/(kg*K)]
      relpermittivity = 1
      density = 4940[kg/m^3]
      thermalconductivity = 7.5[W/(m*K)]
    Enu "Young's modulus and Poisson's ratio"
      youngsmodulus = 105e9[Pa]
      poissonsratio = 0.33
  mat2: Common "Material 2" on domains 17
    def "Basic"
      electricconductivity = 2
  mat3: Common "Material 3" on domains 18
    def "Basic"
      electricconductivity = 1

Physics
  ec: ConductiveMedia "Electric Currents" on all domains
    dependent variable V
    cucn1: CurrentConservation (default)
    ein1: ElectricInsulation (default)
    init1: init "Initial Values 1" (default)
    ncd1: NormalCurrentDensity on boundaries 1 | nJ = 1
    gnd1: Ground on boundaries 4

Mesh
  mesh1 "Mesh 1" (physics-controlled)

Studies
  std1 "Study 1"
    stat: Stationary

Solver configurations
  sol1 "Solution 1" (study std1)
    v1: Variables "Dependent Variables 1"
    s1: Stationary "Stationary Solver 1"
      dDef: Direct
      fc1: FullyCoupled | linsolver = dDef

Datasets
  dset1: Solution | solution = sol1

Plots
  pg1: PlotGroup2D "Electric Potential (ec)" | data = dset1
    surf1: Surface | expr = V; descr = Electric potential
    str1: Streamline | expr = {ec.Jx, ec.Jy}
  pg2: PlotGroup2D "2D Plot Group 2" | data = dset1
    str1: Streamline | expr = {ec.Ex, ec.Ey}; descr = Electric field
    con1: Contour | expr = V; contourtype = tubes; tuberadiusscale = 0.0088
    line1: Line | expr = V